// SBML level 3 version 2

function logistic_growth(p_u, Tu, T_max)
  p_u*Tu*(1 - Tu/T_max);
end

function logistic_growth_for_macrophages(p_m1, M1, M2, M)
  p_m1*M1*(1 - (M1 + M2)/M);
end

function multiple_three_variables(first_variable, second_variable, third_variable)
  first_variable*second_variable*third_variable;
end

function multiple_two_variables(first_variable, second_variable)
  first_variable*second_variable;
end

function saturation_function(constant, main_variable, saturation_variable, half_variable)
  constant*main_variable*(saturation_variable/(half_variable + saturation_variable));
end

function saturation_function_alt(constant, main_variable, first_saturation_variable, second_saturation_variable, half_variable)
  constant*main_variable*(first_saturation_variable/(half_variable + second_saturation_variable));
end

model Ryapolova_and_Babaev_2026___CT26_tumor_treatment_with_rVSV_GFP_and_rVSV_mIL12_mGMCSF()
  // My_model

  // Compartments:
  compartment tumor = 1 dimensionless; tumor is "Tumor";

  // Species:
  species M1 in tumor = 0;
  species M2 in tumor = 0;
  species Teff in tumor = 0;
  species Ti in tumor = 0;
  species Tu in tumor = 400000/tumor;
  species VSV in tumor = 0;
  species mIL12_mGMCSF in tumor = 0; mIL12_mGMCSF is "mIL12-mGMCSF";  // substance in mkg

  // Parameters:
  // Dendritic cell maturation
  DC_m has dimensionless;
  // The discrete variable used to describe the mIL12-mGMCSF release from infected tumor cells, which can take the values 0 (no release corresponding to VSV-GFP case) or 1 (release corresponding to VSV-mIL12-mGMCSF case)
  If_mIL12_mGMCSF = 0 dimensionless;
  // Carrying capacity of macrophages
  M = 1e8;
  // Tumor cell death
  TCD has per_day;
  // Maximum tumor capacity
  T_max = 5e9;
  // Volume of total tumor
  T_volume has mm_3;
  // mIL12-induced M1 macrophages activation rate
  a_m1_IL12 = 1193551 per_day;
  // Rate at which infected tumor cells activate M1
  a_m1_i = 1e-6 per_day;
  // Rate at which uninfected tumor cells activate M1
  a_m1_u = 3e-6 per_day;
  // Rate at which VSV activates M1
  a_m1_v = 1e-6 per_day;
  // Rate at which uninfected tumor cells activate M2
  a_m2_u = 4e-8 per_day;
  // A conditional parameter entered to preserve the dimension of the variable DC_m
  alpha = 1 per_day;
  // Rate at which CD8+ T-cells eliminate infected tumor cells
  d_e_i = 4.4 per_day;
  // Rate at which CD8+ T-cells eliminate uninfected tumor cells
  d_e_u = 0.44 per_day;
  // Rate at which CD8+ T-cells eliminate VSV
  d_e_v = 4.4 per_day;
  // Rate at which M1 eliminate infected tumor cells
  d_m1_i = 1.5 per_day;
  // Rate at which M1 eliminate uninfected tumor cells
  d_m1_u = 0.01 per_day;
  // Rate at which M1 eliminate VSV
  d_m1_v = 1.5 per_day;
  // Rate at which M2 support proliferation of uninfected tumor cells
  d_m2_u = 0.4 per_day;
  // Rate at which uninfected tumor cells inactivate CD8+ T-cells
  d_u_e = 1e-10;
  // Rate at which VSV infect uninfected tumor cells
  d_v_u = 0.02162618;
  // Rate at which the oncolytic virus kills an infected tumour cell
  delta = 0.475 per_day;
  // Natural death rate of CD8+ T cells
  e_e = 0.4 per_day;
  // Natural death rate of M1 macrophages
  e_m1 = 0.2 per_day;
  // Natural death rate of M2 macrophages
  e_m2 = 0.2 per_day;
  // Death rate of oncolytic virus particles
  e_v = 2 per_day;
  // The first intratumoral dose of VSV
  first_VSV_dose = 0;
  // Days after tumor inoculation when first dose of VSV was administrated
  first_VSV_injection_day = 11;
  // Number of CD8+ T-cells when they provide half of their maximum effect
  h_e = 1;
  // Number of M1/M2 when they provide half of their maximum effect
  h_m = 1000;
  // Number of uninfected tumor cells when they provide half of their maximum effect
  h_u = 5e9;
  // Number of uninfected tumor cells when they provide half of the maximum VSV infection rate
  h_u_v = 100000;
  // Impact rate of mGMCSF to DC_m
  k_DC = 8.953724 per_mkg;
  // The spontaneous elimination rate of mIL12-mGMCSF fusion protein
  mIL12_mGMCSF_el = 6.34728 per_day;
  // Proliferation rate of CD8+ T-cells
  p_e = 230.2422;
  // Proliferation rate of M1
  p_m1 = 0.22 per_day;
  // Proliferation rate of M2
  p_m2 = 0.22 per_day;
  // Tumor proliferation rate
  p_u = 0.4 per_day;
  // Baseline M1→ M2 re-polarisation rate in response to cytokines in the microenvironment
  r_m1_0 = 0.001 per_day;
  // Rate at which uninfected tumor cells stimulate M1-M2 polarization
  r_m1_u = 4 per_day;
  // Baseline M1→ M2 re-polarisation rate in response to cytokines in the microenvironment
  r_m2_0 = 0.001 per_day;
  // The second intratumoral dose of VSV
  second_VSV_dose = 0;
  // Days after tumor inoculation when second dose of VSV was administrated
  second_VSV_injection_day = 14;
  // The third intratumoral dose of VSV
  third_VSV_dose = 0;
  // Days after tumor inoculation when third dose of VSV was administrated
  third_VSV_injection_day = 17;

  // Assignment rules:
  DC_m := TCD^2/(TCD^2 + (alpha/(1 + k_DC*mIL12_mGMCSF))^2);
  TCD := (saturation_function(d_e_u, Tu, Teff, h_e) + saturation_function_alt(d_m1_u, Tu, M1, M2, h_m))/Tu + (multiple_two_variables(delta, Ti) + saturation_function(d_e_i, Ti, Teff, h_e) + saturation_function_alt(d_m1_i, Ti, M1, M2, h_m))/T_tot;
  T_volume := (Tu + Ti)/1000000;
  Immune_total := M1 + M2 + Teff;
  T_tot := Tu + Ti;

  // Reactions:
  M1_M2_basal_polarization: M1 => M2; multiple_two_variables(M1, r_m1_0); M1_M2_basal_polarization is "M1 -> M2";
  M1_M2_polarization_via_uninfected_tumor_cells: M1 => M2; saturation_function(r_m1_u, M1, Tu, h_u); M1_M2_polarization_via_uninfected_tumor_cells is "M1 -Tu-> M2";  // modifiers: Tu
  M1_activation_via_infected_tumor_cells: => M1; multiple_two_variables(a_m1_i, Ti); M1_activation_via_infected_tumor_cells is "-Ti-> M1";  // modifiers: Ti
  M1_activation_via_uninfected_tumor_cells: => M1; multiple_two_variables(a_m1_u, Tu); M1_activation_via_uninfected_tumor_cells is "-Tu-> M1";  // modifiers: Tu
  M1_elimination: M1 => ; multiple_two_variables(e_m1, M1); M1_elimination is "M1 ->";
  M1_growth: => M1; logistic_growth_for_macrophages(p_m1, M1, M2, M); M1_growth is "-> M1";
  M2_M1_basal_polarization: M2 => M1; multiple_two_variables(M2, r_m2_0); M2_M1_basal_polarization is "M2 -> M1";
  M2_activation_via_uninfected_tumor_cells: => M2; multiple_two_variables(a_m2_u, Tu); M2_activation_via_uninfected_tumor_cells is "-Tu-> M2";  // modifiers: Tu
  M2_elimination: M2 => ; multiple_two_variables(e_m2, M2); M2_elimination is "M2 ->";
  M2_growth: => M2; logistic_growth_for_macrophages(p_m2, M2, M1, M); M2_growth is "-> M2";
  tumor_Ti_tumor_VSV: Ti => 2500 VSV; multiple_two_variables(delta, Ti); tumor_Ti_tumor_VSV is "tumor/Ti -> tumor/VSV";
  Tu_VSV_Ti: Tu => Ti; saturation_function(d_v_u, VSV, Tu, h_u_v); Tu_VSV_Ti is "Tu -VSV-> Ti";  // modifiers: VSV
  tumor_Ti_tumor_mIL12_mGMCSF: => mIL12_mGMCSF; multiple_three_variables(If_mIL12_mGMCSF, delta, Ti); tumor_Ti_tumor_mIL12_mGMCSF is "-tumor/Ti-> tumor/mIL12_mGMCSF";  // modifiers: Ti
  tumor_mIL12_mGMCSF_tumor_M1: => M1; multiple_two_variables(a_m1_IL12, mIL12_mGMCSF); tumor_mIL12_mGMCSF_tumor_M1 is "-tumor/mIL12_mGMCSF-> tumor/M1";  // modifiers: mIL12_mGMCSF
  VSV_M1: VSV => ; saturation_function_alt(d_m1_v, VSV, M1, M2, h_m); VSV_M1 is "VSV -M1->";  // modifiers: M1
  Reaction_6: VSV => ; multiple_two_variables(e_v, VSV); Reaction_6 is "VSV ->";
  VSV_Teff: VSV => ; saturation_function(d_e_v, VSV, Teff, h_e); VSV_Teff is "VSV -Teff->";  // modifiers: Teff
  M1_VSV: M1 => ; multiple_two_variables(a_m1_v, VSV); M1_VSV is "M1 -VSV->";  // modifiers: VSV
  tumor_mIL12_mGMCSF: mIL12_mGMCSF => ; multiple_two_variables(mIL12_mGMCSF_el, mIL12_mGMCSF); tumor_mIL12_mGMCSF is "tumor/mIL12_mGMCSF ->";
  Teff_activation_via_DC: => Teff; multiple_two_variables(p_e, DC_m); Teff_activation_via_DC is "-> Teff";
  Teff_elimination: Teff => ; multiple_two_variables(e_e, Teff); Teff_elimination is "tumor/Teff ->";
  Teff_inactivation_via_uninfected_tumor_cells: Teff => ; multiple_three_variables(d_u_e, Tu, Teff); Teff_inactivation_via_uninfected_tumor_cells is "tumor/Teff -tumor/Tu->";  // modifiers: Tu
  infected_tumor_cells_elimination_via_M1: Ti => ; saturation_function_alt(d_m1_i, Ti, M1, M2, h_m); infected_tumor_cells_elimination_via_M1 is "Ti -M1->";  // modifiers: M1
  infected_tumor_cells_elimination_via_Teff: Ti => ; saturation_function(d_e_i, Ti, Teff, h_e); infected_tumor_cells_elimination_via_Teff is "Ti -Teff, Ab_PD1_tm->";  // modifiers: Teff
  tumor_elimination_via_M1: Tu => ; saturation_function_alt(d_m1_u, Tu, M1, M2, h_m); tumor_elimination_via_M1 is "Tu -M1->";  // modifiers: M1
  tumor_growth: => Tu; logistic_growth(p_u, Tu, T_max); tumor_growth is "-> Tu";
  tumor_growth_via_M2: => Tu; saturation_function(d_m2_u, Tu, M2, h_m); tumor_growth_via_M2 is "-M2-> Tu";  // modifiers: M2
  uninfected_tumor_cells_elimination_via_Teff: Tu => ; saturation_function(d_e_u, Tu, Teff, h_e); uninfected_tumor_cells_elimination_via_Teff is "Tu -Teff, Ab_PD1_tm->";  // modifiers: Teff

  // Events:
  VSV_injection: at (time >= first_VSV_injection_day), t0=false, fromTrigger=false: VSV = VSV + first_VSV_dose;
  VSV_injection_1: at (time >= second_VSV_injection_day), t0=false, fromTrigger=false: VSV = VSV + second_VSV_dose;
  VSV_injection_2: at (time >= third_VSV_injection_day), t0=false, fromTrigger=false: VSV = VSV + third_VSV_dose;

  // Unit definitions:
  unit per_mkg = 1 / (1e-9 kilogram);
  unit dimensionless = 1;
  unit mm_3 = 1e-6 litre;
  unit mkg = 1e-9 kilogram;
  unit per_day = 1 / (86400 second);
  unit day = 86400 second;
end
